// SBML level 2 version 4

model iGameModel()

  // Compartments:
  compartment Flask = 0.4;
  compartment E_coli in Flask = 1e-14;

  // Species:
  species sPecIes0 in Flask = 1e-20;  // substance in mole
  species sPecIes1 in E_coli = 1e-22/E_coli;  // substance in mole
  species mrna in E_coli = 0;
  species prot in E_coli = 0;
  species sPecIes4 in E_coli = 0;

  // Reactions:
  amplification_of_Ecoli: => sPecIes0; amplification_of_Ecoli_kgrowth*(1 - sPecIes0/maxc)*sPecIes0*Flask;
    amplification_of_Ecoli_kgrowth = 0.0005766 per_second; maxc = 1.66e-12 per_second;
  amplification_of_tm_pSB1A3: => sPecIes1; amplification_of_tm_pSB1A3_kgrowth*sPecIes1*E_coli;
    amplification_of_tm_pSB1A3_kgrowth = 1 per_second;
  transcription: => mrna; k_tc*sPecIes1*E_coli;  // modifiers: sPecIes1
    k_tc = 0.5 per_second;
  translation: => prot; k_tl*mrna*E_coli;  // modifiers: mrna
    k_tl = 6.93 per_second;
  dimerization_lacI: prot + prot -> sPecIes4; kon*prot*prot*E_coli;
    kon = 1000000000 litre_per_mole_per_second;

  // Unit definitions:
  unit per_second = 1 / second;
  unit mole_per_litre = mole / litre;
  unit litre_per_mole_per_second = litre / (mole * second);
end
